OpenVSP model (file version 5), 8 components.
Geometry view with OpenVSP parameter names; values to 6 digits, angles in degrees, lengths in the model's unit.
Overall bounding box: X_Min=-2.42 X_Len=8.17438 Y_Min=-5.49791 Y_Len=10.9958 Z_Min=-0.95 Z_Len=2.86

Wing "Wing"
  location (X Y Z) -0.42 0 0.71, rotation 0 0 0
  symmetric about XZ
  bounding box size 1.67015 10.9958 0.302629
  totals: TotalSpan=11 TotalProjectedSpan=10.9958 TotalChord=1.34167 TotalArea=16.7544 TotalAR=7.21651 MAC=1.54557
  root: chord 1.67, twist 0, NACA 4-series Camber=0.02 CamberLoc=0.4 ThickChord=0.12
  sections:
    n  Span  Root_Chord  Tip_Chord  Area    Sweep  Sweep_Location  Dihedral  Twist  Twist_Location  tip airfoil
    1  0.55  1.67        1.67       0.9185  0      0               0         0      0.25            as above
    2  2.09  1.67        1.67       3.4903  0      0               1.7       0      0.25            as above
    3  2.65  1.67        1.15       3.7365  3.9    0               1.7       0      0.25            as above
    4  0.07  1.15        1.15       0.0805  0      0               0         0      0.25            as above
    5  0.08  1.15        1.09       0.0896  35.2   0               0         0      0.25            as above
    6  0.06  1.09        0.97       0.0618  64.5   0               0         0      0.25            as above
  SS_Control "Flaps": UStart=0.375 UEnd=0.25 Length_C_Start=0.2 Length_C_End=0.2 Length_Start=0.334 Length_End=0.334 LE_Flag=0 Surf_Type=2
  SS_Control "Ailerons": UStart=0.612745 UEnd=0.377451 Length_C_Start=0.2 Length_C_End=0.2 Length_Start=0.23 Length_End=0.331961 LE_Flag=0 Surf_Type=2

Wing "StabHor"
  location (X Y Z) 4 0 0.35, rotation 0 0 0
  symmetric about XZ
  bounding box size 1.3609 3.48 0.158472
  totals: TotalSpan=3.48 TotalProjectedSpan=3.48 TotalChord=0.91875 TotalArea=3.6323 TotalAR=3.33409 MAC=1.07112
  root: chord 0.9, twist -2, NACA 4-series Camber=0 CamberLoc=0.2 ThickChord=0.12
  sections:
    n  Span  Root_Chord  Tip_Chord  Area     Sweep  Sweep_Location  Dihedral  Twist  Twist_Location  tip airfoil
    1  0.1   0.9         0.88       0.089    9.7    0               0         0      0.25            as above
    2  0.14  0.88        1.32       0.154    9.7    0               0         0      0.25            as above
    3  1.43  1.32        0.82       1.5301   9.7    0               0         0      0.25            NACA 4-series Camber=0 CamberLoc=0.2 ThickChord=0.09
    4  0.07  0.82        0.41       0.04305  63.1   0               0         0      0.25            as above
  SS_Control "Elevator": UStart=0.5 UEnd=0.666667 Length_C_Start=0.4 Length_C_End=0.6 Length_Start=0.528 Length_End=0.492 LE_Flag=0 Surf_Type=2

Wing "StabVer"
  location (X Y Z) 2.09 0 0.13, rotation 90 0 0
  bounding box size 3.66438 0.296284 1.78
  totals: TotalSpan=1.78 TotalProjectedSpan=1.78 TotalChord=1.90125 TotalArea=2.9546 TotalAR=1.07236 MAC=2.15241
  root: chord 2.71, twist 0, NACA 4-series Camber=0 CamberLoc=0.2 ThickChord=0.09
  sections:
    n  Span  Root_Chord  Tip_Chord  Area    Sweep  Sweep_Location  Dihedral  Twist  Twist_Location  tip airfoil
    1  0.38  2.71        3.29       1.14    0      0               0         0      0.25            as above
    2  0.31  3.29        1.43       0.7316  80.9   0               0         0      0.25            as above
    3  0.16  1.43        1.18       0.2088  61.7   0               0         0      0.25            as above
    4  0.93  1.18        0.7        0.8742  38.2   0               0         0      0.25            NACA 4-series Camber=0 CamberLoc=0.2 ThickChord=0.06
  SS_Control "SS_CONT_0": UStart=0.191176 UEnd=0.828431 Length_C_Start=0.2 Length_C_End=0.4 Length_Start=0.559059 Length_End=0.285647 LE_Flag=0 Surf_Type=2

Fuselage "Fuselage"
  location (X Y Z) -2.42 0 0, rotation 0 0 0
  bounding box size 7.23 1.23139 1.59825
  Design: Length=7.23
  cross sections:
    n  XLocPercent  YLocPercent  ZLocPercent  shape
    0  0            0            0            point
    1  0.0567082    0            0            ellipse Ellipse_Height=0.28 Ellipse_Width=0.28
    2  0.0746888    0            -0.00691563  super ellipse Super_Height=0.52 Super_M=2 Super_MaxWidthLoc=0.29 Super_N=2 Super_Width=0.82
    3  0.149378     0            -0.02213     super ellipse Super_Height=0.98 Super_M=2 Super_MaxWidthLoc=0.29 Super_N=2.69 Super_Width=1
    4  0.210235     0            -0.0193638   super ellipse Super_Height=1.04 Super_M=2 Super_MaxWidthLoc=0.24 Super_N=4 Super_Width=1.07
    5  0.275242     0            0.0124481    general fuselage BotStr=1.5 BotTanAngle=90 CornerRad=0 Height=1.45 LowStr=1 MaxWidthLoc=0 TopStr=2 TopTanAngle=90 UpStr=1.5 Width=1.1
    6  0.507607     0            0.0193638    general fuselage BotStr=1.5 BotTanAngle=90 CornerRad=0 Height=1.22 LowStr=1 MaxWidthLoc=0 TopStr=1.5 TopTanAngle=90 UpStr=1.5 Width=1.1
    7  0.586445     0            0.00968188   super ellipse Super_Height=0.88 Super_M=3 Super_MaxWidthLoc=0 Super_N=3 Super_Width=0.97
    8  0.986169     0            0.0428769    super ellipse Super_Height=0.36 Super_M=2 Super_MaxWidthLoc=0 Super_N=2 Super_Width=0.1
    9  1            0            0.0428769    point

Blank "BlankGeom"
  location (X Y Z) 0.02 0 0, rotation 0 0 0

Propeller "PropGeom"
  location (X Y Z) -2.13115 0 0, rotation 0 0 0
  bounding box size 0 1.9 1.9
  Design: Diameter=1.9 NumBlade=2 Beta34=20 UseBeta34Flag=1 Feather=0 Rotate=0 Precone=0 ReverseFlag=0 FoldAngle=0 PropMode=2 AF=151.538 CLi=0.538798 Chord=0.177656 Solidity=0.113099 ConstructXoC=0.5 FeatherAxisXoC=0.5 FeatherOffsetXoC=0
  cross sections:
    n  RadiusFrac  shape
    0  0.2         ellipse Ellipse_Height=0.038 Ellipse_Width=0.076
    1  0.4         NACA 16-series Chord=0.157938 IdealCl=0.7 ThickChord=0.144074
    2  1           NACA 16-series Chord=0.1235 IdealCl=0.2 ThickChord=0.03
  Chord along r/R (cubic Bezier): 0.2: 0.08, 0.333333: 0.15, 0.466667: 0.2, 0.6: 0.2, 0.716667: 0.2, 0.833333: 0.2, 0.95: 0.2, 0.966667: 0.2, 0.983333: 0.2, 1: 0.13
  Twist along r/R (PCHIP): 0.2: 46.75, 0.75: 20, 1: 13
  Thick along r/R (cubic Bezier): 0.2: 0.5, 0.233333: 0.3, 0.266667: 0.225, 0.3: 0.2, 0.4: 0.125, 0.5: 0.115, 0.6: 0.1, 0.733333: 0.075, 0.866667: 0.055, 1: 0.03
  CLI along r/R (cubic Bezier): 0.2: 0, 0.266667: 0.7, 0.333333: 0.7, 0.4: 0.7, 0.466667: 0.7, 0.533333: 0.7, 0.6: 0.7, 0.733333: 0.7, 0.866667: 0.7, 1: 0.2

NGonMesh "MeshGeom_NGon"
  location (X Y Z) 0 0 0, rotation 0 0 0

NGonMesh "MeshGeom_NGon"
  location (X Y Z) 0 0 0, rotation 0 0 0

VSPAERO settings (reference component "Wing"): Sref=16.7544 bref=11 cref=1.34167 Xcg=-0.034 Ycg=-3.5476e-06 Zcg=0.71 AlphaStart=-5 AlphaEnd=12 AlphaNpts=5 BetaStart=0 BetaEnd=5 BetaNpts=1 MachStart=0.1 MachEnd=0 MachNpts=1 ReCref=4e+06 Vinf=38 Rho=0.002377
  control group "Wing_Flaps": DeflectionAngle=0
  control group "StabHor_Elevator": DeflectionAngle=-10
  control group "Wing_Ailerons": DeflectionAngle=0
  control group "Rudder": DeflectionAngle=0
